R_s == (V_s - V_f)/I_f
# Where: R_s = Series Resistor Value
# V_s = Supply Voltage
# V_f = LED Forward Voltage
# I_f = LED Forward Current
V_s := 3.3 V
V_f := 1.75 V
I_f := 10 mA
R_s := (V_s - V_f)/I_f
R_s = 155 Ω
# Upper nearest preffered value (McClure, n.d.) = 160 Ω
